// COMSOL Multiphysics 4.4.0.195 model "plate_with_hole.mph"
// Outline of the model tree

Geometry
  geom1 "Geometry 1" (3D, length unit m)
    blk1: Block | base = center; size = {5[cm], 3[mm], 10[cm]}
    blk2: Block | base = center; size = {5[cm], 3[mm], 3[cm]}
    blk3: Block | base = center; size = {3[cm], 3[mm], 3[cm]}
    cyl1: Cylinder | pos = {0, -5[mm], 0}; axistype = y; r = 1.0[cm]; h = 8[mm]
    dif1: Difference | input = blk1, blk2, blk3; input2 = cyl1
    fin: Finalize "Form Union"

Physics
  solid: SolidMechanics on all domains
    dependent variable u = {u, v, w}
    lemm1: LinearElasticModel "Linear Elastic Material 1" (default)
      E_mat = userdef
      E = 70.0e9
      nu_mat = userdef
      nu = 0.3
      rho_mat = userdef
      rho = 2880
    free1: Free (default)
    init1: init "Initial Values 1" (default)
    bndl1: BoundaryLoad on boundaries 3 | FperArea = {0, 0, -3e6}
    fix1: Fixed "Fixed Constraint 1" on boundaries 10

Mesh
  mesh1 "Mesh 1"
    size: MeshSizeDefault | hmax = 0.01; hmin = 0.0018; hcurve = 0.6; hnarrow = 0.5; hgrad = 1.5; hauto = 5
    map1: Map "Mapped 1" on boundaries 2, 5, 24
      size1: Size on boundaries 2, 5, 24 | hmax = 3[mm]; hauto = 5; custom = on
    ftri1: FreeTri "Free Triangular 1" on boundaries 8
    swe1: Sweep "Swept 1" on domains 1-3, 5
    conv1: Convert on boundaries 14, 16, 17, 23 | splitmethod = diagonal
    size1: Size on boundaries 19-22 | hmax = 1[mm]; hauto = 5; custom = on
    ftet1: FreeTet "Free Tetrahedral 1" on remaining entities

Studies
  std1 "Study 1"
    stat: Stationary

Solver configurations
  sol1 "Solver 1" (study std1)
    v1: Variables "Dependent Variables 1"
    s1: Stationary "Stationary Solver 1"
      dDef: Direct
      fc1: FullyCoupled | linsolver = dDef; termonres = auto; reserrfact = 1000

Datasets
  dset1: Solution | solution = sol1

Plots
  pg1: PlotGroup3D "Stress (solid)" | data = dset1
    surf1: Surface | expr = solid.mises
      def: Deform "Deformation" | expr = {u, v, w}
    mesh1: Mesh
      def1: Deform "Deformation 1" | expr = {u, v, w}